lip
0.0
0 0 0.0
0.222222222 0.230452675 1.000000000
0.164370700 0.0 0.000000000
SURFACE
Left
20 1.0 32 -2.0
COMPONENT
1
SECTION
0.270190866 -0.500000000 0.000000000 0.148148148 -0.500000000
NACA
0008
CONTROL
reflL 1.0 0.800000 0.0 1.0 0.0 1.0
SECTION
0.108076346 -0.200000000 0.000000000 0.237037037 -0.500000000
NACA
0008
CONTROL
reflL 1.0 0.800000 0.0 1.0 0.0 1.0
SECTION
0.000000000 -0.000000000 0.000000000 0.296296296 -0.500000000
NACA
0008
SURFACE
Right
20 1.0 32 -2.0
COMPONENT
1
SECTION
0.000000000 0.000000000 0.000000000 0.296296296 0.500000000
NACA
0008
SECTION
0.108076346 0.200000000 0.000000000 0.237037037 0.500000000
NACA
0008
CONTROL
reflR 1.0 0.800000 0.0 1.0 0.0 1.0
SECTION
0.270190866 0.500000000 0.000000000 0.148148148 0.500000000
NACA
0008
CONTROL
reflR 1.0 0.800000 0.0 1.0 0.0 1.0
SURFACE
Fin
5 1.0 8 -2.0
SECTION
0.407407407 0.0 0.090000000 0.148148148 0.0
NACA
0008
CONTROL
finyaw 1.0 0.0 0.0 0.0 1.0 1.0
SECTION
0.407407407 0.0 0.0 0.148148148 0.0
NACA
0008
CONTROL
finyaw 1.0 0.0 0.0 0.0 1.0 1.0
