t
0.0
0 0 0.0
0.166666667 0.172839506 1.000000000
0.115099821 0.0 0.000000000
SURFACE
Left
24 1.0 48 -2.0
COMPONENT
1
SECTION
0.161752374 -0.500000000 0.000000000 0.111111111 0.000000000
NACA
0008
SECTION
0.000000000 -0.000000000 0.000000000 0.222222222 0.000000000
NACA
0008
SURFACE
Right
24 1.0 48 -2.0
COMPONENT
1
SECTION
0.000000000 0.000000000 0.000000000 0.222222222 0.000000000
NACA
0008
SECTION
0.161752374 0.500000000 0.000000000 0.111111111 0.000000000
NACA
0008
SURFACE
Tail
6 1.0 10 -2.0
YDUPLICATE
0.0
SECTION
0.432539683 0.0 0.0 0.047619048 0.000000000
NACA
0006
SECTION
0.432539683 0.175000000 0.0 0.047619048 0.000000000
NACA
0006
