tail
0.0
0 0 0.0
0.166666667 0.166666667 1.000000000
0.216718551 0.0 0.000000000
SURFACE
Left
20 1.0 32 -2.0
COMPONENT
1
SECTION
0.350103769 -0.500000000 0.026203890 0.166666667 0.000000000
NACA
0008
SECTION
0.000000000 -0.000000000 0.000000000 0.166666667 0.000000000
NACA
0008
SURFACE
Right
20 1.0 32 -2.0
COMPONENT
1
SECTION
0.000000000 0.000000000 0.000000000 0.166666667 0.000000000
NACA
0008
SECTION
0.350103769 0.500000000 0.026203890 0.166666667 0.000000000
NACA
0008
SURFACE
Tail
6 1.0 10 -2.0
YDUPLICATE
0.0
SECTION
0.323809524 0.0 0.000000000 0.038095238 -4.000000000
NACA
0006
SECTION
0.323809524 0.175000000 0.000000000 0.038095238 -4.000000000
NACA
0006
SURFACE
Fin
5 1.0 8 -2.0
SECTION
0.312500000 0.0 0.120000000 0.083333333 0.0
NACA
0008
CONTROL
finyaw 1.0 0.0 0.0 0.0 1.0 1.0
SECTION
0.312500000 0.0 0.0 0.083333333 0.0
NACA
0008
CONTROL
finyaw 1.0 0.0 0.0 0.0 1.0 1.0
