pure
0.0
0 0 0.0
0.222222222 0.230452675 1.000000000
0.177697998 0.0 0.000000000
SURFACE
Left
32 1.0 64 -2.0
COMPONENT
1
SECTION
0.270190866 -0.500000000 0.026203890 0.148148148 0.000000000
NACA
0008
SECTION
0.000000000 -0.000000000 0.000000000 0.296296296 0.000000000
NACA
0008
SURFACE
Right
32 1.0 64 -2.0
COMPONENT
1
SECTION
0.000000000 0.000000000 0.000000000 0.296296296 0.000000000
NACA
0008
SECTION
0.270190866 0.500000000 0.026203890 0.148148148 0.000000000
NACA
0008
SURFACE
Fin
5 1.0 8 -2.0
SECTION
0.407407407 0.0 0.090000000 0.148148148 0.0
NACA
0008
CONTROL
finyaw 1.0 0.0 0.0 0.0 1.0 1.0
SECTION
0.407407407 0.0 0.0 0.148148148 0.0
NACA
0008
CONTROL
finyaw 1.0 0.0 0.0 0.0 1.0 1.0
