t
0.0
0 0 0.0
0.222222222 0.230452675 1.000000000
0.164673700 0.0 0.000000000
SURFACE
Left
20 1.0 32 -2.0
COMPONENT
1
SECTION
0.270190866 -0.500000000 0.026203890 0.148148148 0.000000000
NACA
0008
SECTION
0.000000000 -0.000000000 0.000000000 0.296296296 0.000000000
NACA
0008
SURFACE
Right
20 1.0 32 -2.0
COMPONENT
1
SECTION
0.000000000 0.000000000 0.000000000 0.296296296 0.000000000
NACA
0008
SECTION
0.270190866 0.500000000 0.026203890 0.148148148 0.000000000
NACA
0008
SURFACE
TipFin
5 1.0 8 -2.0
YDUPLICATE
0.0
SECTION
0.270190866 0.500000000 0.056203890 0.148148148 0.0
NACA
0008
SECTION
0.270190866 0.500000000 -0.003796110 0.148148148 0.0
NACA
0008
