b45flap
0.0
0 0 0.0
0.035555556 0.092181070 0.400000000
0.065000000 0.0 0.0
SURFACE
Wing
20 1.0
YDUPLICATE
0.0
SECTION
0.000000000 0.000000000 0.0 0.118518519 0.0 6 1.0
NACA
0000
SECTION
0.016211452 0.030000000 0.0 0.109629630 0.0 8 1.0
NACA
0000
CONTROL
flap -1.0 0.908783784 0 0 0 1.0
SECTION
0.043230539 0.080000000 0.0 0.094814815 0.0 15 1.0
NACA
0000
CONTROL
flap -1.0 0.894531250 0 0 0 1.0
SECTION
0.108076346 0.200000000 0.0 0.059259259 0.0 0 1.0
NACA
0000
SURFACE
TipFin
5 1.0 8 -2.0
YDUPLICATE
0.0
SECTION
0.108076346 0.200000000 0.012000000 0.059259259 0.0
NACA
0000
SECTION
0.108076346 0.200000000 -0.012000000 0.059259259 0.0
NACA
0000
