BSvfin
0.0
0 0 0.0
0.006578947 0.029408930 0.250000000
0.027361527 0.0 0.0
SURFACE
Wing
20 1.0 32 -2.0
YDUPLICATE
0.0
SECTION
0.000000000 0.000000000 0.000000000 0.037244304 0.0
NACA
0000
SECTION
0.000546804 0.006250000 0.000000000 0.036697500 0.0
NACA
0000
SECTION
0.004374433 0.050000000 0.000000000 0.031657658 0.0
NACA
0000
SECTION
0.040127041 0.080000000 0.000000000 0.024692974 0.0
NACA
0000
SECTION
0.071410573 0.106250000 0.000000000 0.015828829 0.0
NACA
0000
SECTION
0.087499246 0.119750000 0.000000000 0.007914415 0.0
NACA
0000
SECTION
0.093755953 0.125000000 0.000000000 0.001899460 0.0
NACA
0000
SURFACE
Tail
6 1.0 10 -2.0
YDUPLICATE
0.0
SECTION
0.037244304 0.000000000 0.0 0.036750000 -10.000000
NACA
0000
SECTION
0.037244304 0.006250000 0.0 0.035771739 -10.000000
NACA
0000
SECTION
0.048077637 0.014375000 0.0 0.023666667 -10.000000
NACA
0000
SECTION
0.067244304 0.028750000 0.0 0.000120000 -10.000000
NACA
0000
SURFACE
VentralFin
5 1.0 8 -2.0
SECTION
0.040244304 0.0 0.000000000 0.018000000 0.0
NACA
0000
SECTION
0.040244304 0.0 -0.010964912 0.018000000 0.0
NACA
0000
