tol_wing_sweep_+0_alpha
0.0
0 0 0.0
0.205714286 0.173999738 1.200000000
0.173606026 0.0 0.000000000
SURFACE
LeftWing
8 1.0 24 -2.0
COMPONENT
1
SECTION
0.297966413 -0.600000000 0.000000000 0.135064935 0.000000000
NACA
0008
SECTION
0.000000000 0.000000000 0.000000000 0.207792208 0.000000000
NACA
0008
SURFACE
RightWing
8 1.0 24 -2.0
COMPONENT
1
SECTION
0.000000000 0.000000000 0.000000000 0.207792208 0.000000000
NACA
0008
SECTION
0.297966413 0.600000000 0.000000000 0.135064935 0.000000000
NACA
0008
SURFACE
FixedTail
6 1.0 10 -2.0
YDUPLICATE
0.0
SECTION
0.430204082 0.000000000 0.000000000 0.039183673 -3.000000000
NACA
0008
SECTION
0.430204082 0.210000000 0.000000000 0.039183673 -3.000000000
NACA
0008
SURFACE
CenterFin
5 1.0 8 -2.0
SECTION
0.462600026 0.000000000 0.070936068 0.086999869 0.000000000
NACA
0008
SECTION
0.453900039 0.000000000 0.000000000 0.086999869 0.000000000
NACA
0008
