tol_fin_yaw_-1_cg176_alpha
0.0
0 0 0.0
0.205714286 0.173999738 1.200000000
0.176000000 0.0 0.000000000
SURFACE
MainWing
8 1.0 24 -2.0
YDUPLICATE
0.0
SECTION
0.000000000 0.000000000 0.000000000 0.207792208 0.000000000
NACA
0008
SECTION
0.297966413 0.600000000 0.000000000 0.135064935 0.000000000
NACA
0008
SURFACE
FixedTail
6 1.0 10 -2.0
YDUPLICATE
0.0
SECTION
0.427755102 0.000000000 0.000000000 0.048979592 -3.000000000
NACA
0008
SECTION
0.427755102 0.210000000 0.000000000 0.048979592 -3.000000000
NACA
0008
SURFACE
CenterFin
5 1.0 8 -2.0
SECTION
0.462600026 0.000000000 0.070936068 0.086999869 0.000000000
NACA
0008
CONTROL
finyaw 1.0 0.0 0.0 0.0 1.0 1.0
SECTION
0.453900039 0.000000000 0.000000000 0.086999869 0.000000000
NACA
0008
CONTROL
finyaw 1.0 0.0 0.0 0.0 1.0 1.0
