F60_span250_tab
0.0
0 0 0.0
0.010416667 0.043209877 0.250000000
0.028992401 0.0 0.0
SURFACE
Wing
20 1.0 32 -2.0
YDUPLICATE
0.0
SECTION
0.000000000 0.000000000 0.000000000 0.055555556 0.000000000
NACA
0000
CONTROL
tab 1.0 0.800 0.0 0.0 0.0 1.0
SECTION
0.032616451 0.062500000 0.000000000 0.041666667 0.000000000
NACA
0000
CONTROL
tab 1.0 0.800 0.0 0.0 0.0 1.0
SECTION
0.065232902 0.125000000 0.000000000 0.027777778 0.000000000
NACA
0000
SURFACE
TipFin
5 1.0 8 -2.0
YDUPLICATE
0.0
SECTION
0.065232902 0.125000000 0.007500000 0.027777778 0.0
NACA
0000
SECTION
0.065232902 0.125000000 -0.007500000 0.027777778 0.0
NACA
0000
