cand_dih3+tipfin_sym4pct
0.0
0 0 0.0
0.166666667 0.172839506 1.000000000
0.104273775 0.0 0.000000000
SURFACE
MainWing
8 1.0 24 -2.0
YDUPLICATE
0.0
SECTION
0.0 0.0 0.0 0.222222222 0.0
NACA
0008
SECTION
0.161752374 0.500000000 0.026203890 0.111111111 0.000000000
NACA
0008
SURFACE
TipFin
5 1.0 8 -2.0
YDUPLICATE
0.0
SECTION
0.161752374 0.500000000 0.056203890 0.111111111 0.0
NACA
0008
SECTION
0.161752374 0.500000000 -0.003796110 0.111111111 0.0
NACA
0008
