cand_dih3+centrefin3pct_1.5cr
0.0
0 0 0.0
0.166666667 0.166666667 1.000000000
0.195617167 0.0 0.000000000
SURFACE
MainWing
8 1.0 24 -2.0
YDUPLICATE
0.0
SECTION
0.0 0.0 0.0 0.166666667 0.0
NACA
0008
SECTION
0.350103769 0.500000000 0.026203890 0.166666667 0.000000000
NACA
0008
SURFACE
CentreFin
5 1.0 8 -2.0
SECTION
0.229166667 0.000000000 0.060000000 0.083333333 0.0
NACA
0008
SECTION
0.229166667 0.000000000 0.000000000 0.083333333 0.0
NACA
0008
