t4_minlip_fullspan_full_c05_a2_incidence_mismatch_deg_m2_o_trim
0.0
0 0 0.0
0.205714286 0.173999738 1.200000000
0.169381013 0.0 0.000000000
SURFACE
Left
20 1.0 32 -2.0
COMPONENT
1
SECTION
0.297966413 -0.600000000 0.0 0.135064935 1.000000000
NACA
0008
CONTROL
reflL 1.0 0.950000 0.0 1.0 0.0 1.0
SECTION
0.163881527 -0.330000000 0.0 0.167792208 1.000000000
NACA
0008
CONTROL
reflL 1.0 0.950000 0.0 1.0 0.0 1.0
SECTION
0.000000000 -0.000000000 0.0 0.207792208 1.000000000
NACA
0008
CONTROL
reflL 1.0 0.950000 0.0 1.0 0.0 1.0
SURFACE
Right
20 1.0 32 -2.0
COMPONENT
1
SECTION
0.000000000 0.000000000 0.0 0.207792208 -1.000000000
NACA
0008
CONTROL
reflR 1.0 0.950000 0.0 1.0 0.0 1.0
SECTION
0.163881527 0.330000000 0.0 0.167792208 -1.000000000
NACA
0008
CONTROL
reflR 1.0 0.950000 0.0 1.0 0.0 1.0
SECTION
0.297966413 0.600000000 0.0 0.135064935 -1.000000000
NACA
0008
CONTROL
reflR 1.0 0.950000 0.0 1.0 0.0 1.0
