incidence_+2_alpha
0.0
0 0 0.0
0.205714286 0.173999738 1.200000000
0.174486026 0.0 0.000000000
SURFACE
MainWing
8 1.0 24 -2.0
YDUPLICATE
0.0
SECTION
0.000000000 0.000000000 0.000000000 0.207792208 0.000000000
NACA
0008
CONTROL
diffinc 1.0 0.0 0.0 1.0 0.0 -1.0
SECTION
0.297966413 0.600000000 0.000000000 0.135064935 0.000000000
NACA
0008
CONTROL
diffinc 1.0 0.0 0.0 1.0 0.0 -1.0
SURFACE
FixedTail
6 1.0 10 -2.0
YDUPLICATE
0.0
SECTION
0.407891906 0.000000000 0.000000000 0.048979592 -3.000000000
NACA
0008
SECTION
0.407891906 0.210000000 0.000000000 0.048979592 -3.000000000
NACA
0008
