sweep_error_-2_alpha
0.0
0 0 0.0
0.205714286 0.173999738 1.200000000
0.159892026 0.0 0.000000000
SURFACE
LeftWing
8 1.0 24 -2.0
COMPONENT
1
SECTION
0.285319029 -0.600000000 0.000000000 0.135064935 -4.000000000
NACA
0008
SECTION
0.000000000 0.000000000 0.000000000 0.207792208 0.000000000
NACA
0008
SURFACE
RightWing
8 1.0 24 -2.0
COMPONENT
1
SECTION
0.000000000 0.000000000 0.000000000 0.207792208 0.000000000
NACA
0008
SECTION
0.310821371 0.600000000 0.000000000 0.135064935 -4.000000000
NACA
0008
