b45ss
0.0
0 0 0.0
0.035555556 0.092181070 0.400000000
0.066000000 0.0 -0.002124814
SURFACE
WingR
20 1.0
COMPONENT
1
SECTION
0.000000000 0.000000000 0.000000000 0.118518519 -0.477775 6 1.0
NACA
0000
SECTION
0.016211452 0.030000000 0.000000000 0.109629630 -0.477775 8 1.0
NACA
0000
CONTROL
flapR -1.0000 0.908783784 0 0 0 1.0
SECTION
0.043230539 0.080000000 0.000000000 0.094814815 -0.477775 15 1.0
NACA
0000
CONTROL
flapR -1.0000 0.894531250 0 0 0 1.0
SECTION
0.108076346 0.200000000 0.000000000 0.059259259 -0.477775 0 1.0
NACA
0000
SURFACE
WingL
20 1.0
COMPONENT
1
SECTION
0.108076346 -0.200000000 0.000000000 0.059259259 0.477775 15 1.0
NACA
0000
SECTION
0.043230539 -0.080000000 0.000000000 0.094814815 0.477775 8 1.0
NACA
0000
CONTROL
flapL -1.0000 0.894531250 0 0 0 1.0
SECTION
0.016211452 -0.030000000 0.000000000 0.109629630 0.477775 6 1.0
NACA
0000
CONTROL
flapL -1.0000 0.908783784 0 0 0 1.0
SECTION
0.000000000 -0.000000000 0.000000000 0.118518519 0.477775 0 1.0
NACA
0000
SURFACE
FinR
5 1.0 8 -2.0
COMPONENT
3
SECTION
0.108076346 0.200000000 0.012000000 0.059259259 0.000000
NACA
0000
CONTROL
tabR 1.0000 0.700000000 0 0 0 1.0
SECTION
0.108076346 0.200000000 -0.012000000 0.059259259 0.000000
NACA
0000
CONTROL
tabR 1.0000 0.700000000 0 0 0 1.0
SURFACE
FinL
5 1.0 8 -2.0
COMPONENT
3
SECTION
0.108076346 -0.200000000 -0.012000000 0.059259259 0.000000
NACA
0000
SECTION
0.108076346 -0.200000000 0.012000000 0.059259259 0.000000
NACA
0000
